M := 2
N := 8
t := 0 .. 1000
x1[t] := (N + 2*M/5)/2*sin(2*π*(M + 1)*t*deg + N*deg) + 0.3*N*(M + 0.2)/5*sin(2*π*10*t*N*deg + M*deg) + (0.5*(M + 1)*cos(2*π*(N + 1)*t*deg + M*deg)) + sin(2*π*10*(M + 1)*t*deg + 6*N*deg) + (N + 4)/(M + 2)*sin(2*π*M*100*t*deg + M*deg) + 5
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mean(x1) = 5.02615
var(x1) = 16.401
stdev(x1) = 4.04981
M := 2
N := 8
t := 0, 10 .. 1000
x2[t] := (N + 2*M/5)/2*sin(2*π*(M + 1)*t*deg + N*deg) + 0.3*N*(M + 0.2)/5*sin(2*π*10*t*N*deg + M*deg) + (0.5*(M + 1)*cos(2*π*(N + 1)*t*deg + M*deg)) + sin(2*π*10*(M + 1)*t*deg + 6*N*deg) + (N + 4)/(M + 2)*sin(2*π*M*100*t*deg + M*deg) + 5
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mean(x2) = 0.494419
var(x2) = 3.85214
stdev(x2) = 1.96269
M := 2
N := 8
t := 0, 20 .. 1000
x3[t] := (N + 2*M/5)/2*sin(2*π*(M + 1)*t*deg + N*deg) + 0.3*N*(M + 0.2)/5*sin(2*π*10*t*N*deg + M*deg) + (0.5*(M + 1)*cos(2*π*(N + 1)*t*deg + M*deg)) + sin(2*π*10*(M + 1)*t*deg + 6*N*deg) + (N + 4)/(M + 2)*sin(2*π*M*100*t*deg + M*deg) + 5
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mean(x3) = 0.277445
var(x3) = 2.21818
stdev(x3) = 1.48936
M := 2
N := 8
t := 0, 100 .. 1000
x4[t] := (N + 2*M/5)/2*sin(2*π*(M + 1)*t*deg + N*deg) + 0.3*N*(M + 0.2)/5*sin(2*π*10*t*N*deg + M*deg) + (0.5*(M + 1)*cos(2*π*(N + 1)*t*deg + M*deg)) + sin(2*π*10*(M + 1)*t*deg + 6*N*deg) + (N + 4)/(M + 2)*sin(2*π*M*100*t*deg + M*deg) + 5
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mean(x4) = 0.0719301
var(x4) = 0.540284
stdev(x4) = 0.73504
# 1.4
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t := 0 .. 500
M := 2
N := 8
y1[t] := (N + 2*M/5)/2*sin(2*π*(M + 1)*t*deg + N*deg)
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mean(y1) = 0.0231698
var(y1) = 9.66994
stdev(y1) = 3.10965
t := 0 .. 500
M := 2
N := 8
y2[t] := 0.3*N*(N + 2)/5*sin(2*π*10*t*N*deg + N*deg)
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mean(y2) = 0.0052946
var(y2) = 11.5229
stdev(y2) = 3.39455
t := 0 .. 500
M := 2
N := 8
y3[t] := 0.5*(M + 1)*cos(2*π*(N + 12)*t*deg)
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mean(y3) = -0.000125892
var(y3) = 1.12683
stdev(y3) = 1.06152
t := 0 .. 500
M := 2
N := 8
y4[t] := 2*M*0.2/8*sin(2*π*M*100*t*deg + N*deg)
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mean(y4) = 9.8728e-5
var(y4) = 0.00489201
stdev(y4) = 0.0699429
t := 0 .. 500
M := 2
N := 8
y5[t] := 4*((M - N + 2)/10)*sin(2*π*10*(N + 1)*t*deg + 6*M*deg)
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mean(y5) = -0.000316843
var(y5) = 1.28112
stdev(y5) = 1.13187
t := 0 .. 500
M := 2
N := 8
y6[t] := (N + 4)/(M + 2)*sin(2*π*M*100*t*deg + M*deg)
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mean(y6) = 0.00281589
var(y6) = 4.42547
stdev(y6) = 2.10368
t := 0 .. 500
M := 2
N := 8
y7[t] := 2*sin(2*π*(M + 14)*t*deg + 6*N*deg)
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mean(y7) = 0.000500407
var(y7) = 2.00178
stdev(y7) = 1.41484
# 1.5  Провести полный гармонический анализ сигнала. Построить спектр амплитуд и спектр фаз. Определить коэффициент гармоник.
t1 := 0 .. 1000
M := 2
N := 8
x1[t1] := (N + 2*M/5)/2*sin(2*π*(M + 1)*t1*deg + N*deg) + 0.3*N*(N + 2)/5*sin(2*π*10*t1*N*deg + N*deg) + (0.5*(M + 1)*cos(2*π*(N + 12)*t1*deg)) + 2*M*0.2/8*sin(2*π*M*100*t1*deg + N*deg) + (4*((M - N + 2)/10)*sin(2*π*10*(N + 1)*t1*deg + 6*M*deg)) + (N + 4)/(M + 2)*sin(2*π*M*100*t1*deg + M*deg) + 2*sin(2*π*(M + 14)*t1*deg + 6*N*deg)
T := 1000
k := 0 .. 200
a[k] := 2/T*sum(x1[t1]*cos(k*t1*2*π/1000), t1 = 1 .. T - 1)
b[k] := 2/T*sum(x1[t1]*sin(k*t1*2*π/1000), t1 = 1 .. T - 1)
x[k] := sqrt(a[k]^2 + b[k]^2)
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